# OpenSim document version 40500
Model Stewart_platform:
  gravity: 0 -9.80665 0
  credits: Gil Serrancoli
  publications: List of publications related to model...
  length_units: meters
  force_units: N
  Ground
  BodySet:
    Body platform: mass=1500 [kg] mass_center=(0 0 0) inertia=(12500 125 12500 0 0 0) meshes=cylinder.vtp
  JointSet:
    CustomJoint joint1: socket_parent_frame=ground_offset socket_child_frame=platform_offset
      Coordinate r1_z: default_value=0 range=(-3.141593 3.141593) clamped=false
      Coordinate r2_x: default_value=0 range=(-3.141593 3.141593) clamped=false
      Coordinate r3_y: default_value=0 range=(-3.141593 3.141593) clamped=false
      Coordinate t4_x: default_value=0 range=(-3.141593 3.141593) clamped=false
      Coordinate t5_y: default_value=0.5 range=(-3.141593 3.141593) clamped=false
      Coordinate t6_z: default_value=0 range=(-3.141593 3.141593) clamped=false
      PhysicalOffsetFrame ground_offset: socket_parent=/ground translation=(0 0 0) [meters]
      PhysicalOffsetFrame platform_offset: socket_parent=/bodyset/platform translation=(0 0 0)
      SpatialTransform:
        TransformAxis rotation1: coordinates=r1_z axis=(0 0 1) LinearFunction(coefficients=1 3.14159)
        TransformAxis rotation2: coordinates=r2_x axis=(1 0 0) LinearFunction(coefficients=1 0)
        TransformAxis rotation3: coordinates=r3_y axis=(0 1 0) LinearFunction(coefficients=1 0)
        TransformAxis translation1: coordinates=t4_x axis=(1 0 0) LinearFunction(coefficients=1 0)
        TransformAxis translation2: coordinates=t5_y axis=(0 1 0) LinearFunction(coefficients=1 0)
        TransformAxis translation3: coordinates=t6_z axis=(0 0 1) LinearFunction(coefficients=1 0)
